*HEADING
Spring Element Model for ADB Testing
*NODE, NSET=ALL_NODES
1, 0.0, 0.0, 0.0
2, 10.0, 0.0, 0.0
3, 0.0, 10.0, 0.0
4, 10.0, 10.0, 0.0
5, 0.0, 0.0, 10.0
6, 10.0, 0.0, 10.0
*NSET, NSET=FIXED
1, 3, 5
*NSET, NSET=LOADED
2, 4, 6
*ELEMENT, TYPE=SPRINGA, ELSET=SPRING_SET
101, 1, 2
102, 3, 4
103, 5, 6
*ELSET, ELSET=ALL_SPRINGS
101, 102, 103
*SPRING, ELSET=SPRING_SET
1000.0
*STEP, NAME=Step-1
*STATIC
1.0, 1.0, 0.1, 1.0
*BOUNDARY
FIXED, 1, 3, 0.0
*CLOAD
LOADED, 1, 100.0
*NODE PRINT, NSET=ALL_NODES
U, RF
*EL PRINT, ELSET=ALL_SPRINGS
S, E
*END STEP
